# Representación paramétrica de la curva de Bezier
# Considere un archivo de texto que contiene los puntos en el plano XY:
# [component: outputs Data]
# En donde se considera que el archivo tiene el formato válido para la lectura. Si desea, el archivo está en este LINK. Los valores se almacenan en la matriz Data, y pueden ser extraídos por columnas en dos vectores.
Px := Data[:, 0]
Py := Data[:, 1]
# El número total de puntos leídos es:
n := last(Px)
# Y la variable de iteración:
i := 0 .. n
# El polonomio de Bernstein
# Las curvas de Bezier se basan en el polinomio de Bernstein, que a su vez se define como:
B(u, i) := n!/(i!*(n - i)!)*u^i*(1 - u)^(n - i)
# En donde 0<u<1.
# Las ventajas que justifican su uso son:
# - No negatividad para B_(i,n)(u) >= 0, para toda i,n y 0<u<1
# - Partición unitaria
# - B_0_(,n)(u) = B_(n,n)(u) = 1
# - Simetría con respecto a u = i/n
# - Definición recursiva, inclusive sus derivadas
#
# La definición de la variable paramétrica u es entonces:
u := 0, 0.01 .. 1
# Las curvas de Bezier son un caso particular de Splines y se definen por la multiplicación de los polinomios de Bernstein por un vector de punto {P}.
C(u, Ρ) := sum(Ρ[i]*B(u, i), i = 0 .. n)
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# El archivo PDF esta en este link.
