# DISTANCIA DE UN PUNTO A UN SEGMENTO DE RECTA
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P := [6; 2; 3]
Q := [1; 4; 2]
R := [1; 2; 5]
# Los vectores entre los puntos:
u := (P - Q)/|P - Q|
v := P - R
# La normal al plano de los tres puntos
η := u×v
# La distancia es la magnitud de la normal:
d := |η| = 3.37145
# y puede escribirse como:
D := |(P - Q)/|P - Q|×(P - R)| = 3.37145
# Considere los vectores u y v. Utilizando producto escalar es posible calcular la distancia
# deseada:
d := v - u*v/|u|^2*u
|d| = 3.37145
# CASO DE DOS DIMENSIONES (2D)
# Para el caso de los puntos en 2D, la tercera dimensión es nula. Suponga los puntos P, Q y R en 2D:
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P := [2; 5; 0]
Q := [5; 1; 0]
R := [6; 4; 0]
## Los vectores u, v
# El vector unitario del segmento de recta P-Q
u := (P - Q)/|P - Q|
# v es el vector a proyectar sobre u
v := P - R
# La normal al plano de los tres puntos
η := u×v
# La distancia es la magnitud de la normal:
d := |η|
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