# CALCULO DE LA ECUACIÓN DE UN PLANO DEFINIDO POR TRES PUNTOS
# Considérese un conjunto de tres puntos como una nube de puntos P. Defínanse los valores de las coordenadas XYZ de cada punto como:
P[0] := [0; 1; 0]
P[1] := [1; 0; 0]
P[2] := [0; 0; 1]
# [component: inputs P]
# En donde la posicion del elemento de cada punto son las coordenadas:
X := 0
Y := 1
Z := 2
# Los vectores marcados por las líneas de la figura 1. Los valores de sus componentes son:
# Vectores
V1 := P[1] - P[0]
V2 := P[2] - P[0]
# la normal se calcula con la ecuación (1):
# Vector normal
N := V2×V1
N = [1; 1; 1]  # Ec. (1a)
# el vector unitario de la normal es entonces
n := N/|N|
n = [0.57735; 0.57735; 0.57735]  # Ec. (1b)
# El área del triángulo es:
A := 1/2*|N|
A = 0.866025  # Ec. (2)
# La ecuación general del plano en función del punto P_0 y el vector normal N es la ecuación (3):
f(x, y, z) := N[X]*(x - P[0][X]) + N[Y]*(y - P[0][Y]) + N[Z]*(z - P[0][Z])  # Ec. (3)
# Resolviendo:
f(x, y, z) → x + y + z - 1
# Finalmente, la distancia de cualquier punto al plano es:
Δ(Φ) := f(Φ[X], Φ[Y], Φ[Z])/|N|  # Ec. (4)
# Ejemplo #1. Suponga un punto O en el origen y calcule la distancia con respecto al plano.
#
# Para definir un punto en el origen bastan las coordenadas:
O := [0; 0; 0]
# la distancia al plano se calcula usando la ecuación (4):
Δ(O) = -0.57735
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# Ejemplo #2. Suponga un punto en el centro de los 3 puntos y calcule la distancia con respecto al plano:
#
# Las coordenadas baricentricas del triángulo se calculan con la ecuación (5):
ϕ := 1/3*sum(P[i], i = 0 .. 2)  # Ec. (5)
# Que como se habrá presupuesto, tiene la distancia al origen como se calculó en el ejemplo anterior #1:
|ϕ| = 0.57735
# Utilizando el centro de gravedad calculado con (5), se utiliza la ec. (4) para calcular la distancia:
Δ(ϕ) = -6.40988e-17
# El archivo PDF se encuentra en este link.
