# Title: Ejercicio de transfomaciones geométricas
# Description: En este ejercicio se lee un archivo de CAD en formato texto con puntos XYZ formando una estrella 2D en el plano XY. Se aplican algunas transformaciones y el resultado se escribe en txt.
## TRANSFORMACIONES 3D Y CAD
# Funciones de transformación 3D+H
Rx(ϕ) := [1, 0, 0, 0; 0, cos(ϕ), -sin(ϕ), 0; 0, sin(ϕ), cos(ϕ), 0; 0, 0, 0, 1]
T(Δx, Δy, Δz) := [1, 0, 0, Δx; 0, 1, 0, Δy; 0, 0, 1, Δz; 0, 0, 0, 1]
Ry(ϕ) := [cos(ϕ), 0, sin(ϕ), 0; 0, 1, 0, 0; -sin(ϕ), 0, cos(ϕ), 0; 0, 0, 0, 1]
E(δx, δy, δz) := [δx, 0, 0, 0; 0, δy, 0, 0; 0, 0, δz, 0; 0, 0, 0, 1]
Rz(ϕ) := [cos(ϕ), -sin(ϕ), 0, 0; sin(ϕ), cos(ϕ), 0, 0; 0, 0, 1, 0; 0, 0, 0, 1]
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# Leer el archivo fuente de texto XY (Z=0):
# formato: x,y,z
#
# 1.978,0.975,0
# 1.912,0.899,0
# 1.847,0.824,0
# 1.781,0.748,0
# ...
# [component: outputs star]
# X es la columna 0,
# Y es la columna 1,
# Z es la columna 2
star[:, 3] := 1  # agregar la coordenada homogénea H en la columna 3
# Realizar todas las transformaciones deseadas:
# Hacer la traspuesta de los datos:
# nótese que se leyó cada punto en renglones
# y los vectores deben ser verticales
R_T := Rz(20*deg)*Rx(45*deg)*transpose(star)
# Aunque en Rhino se puede leer puntos en formato X,Y,Z,H
# por limpieza de código copiamos en una matriz X,Y,Z:
R[:, 0] := transpose(R_T)[:, 0]
R[:, 1] := transpose(R_T)[:, 1]
R[:, 2] := transpose(R_T)[:, 2]
# Finalmente se graba en un archivo de texto el resultado
# [component: inputs R]
# Importando el archivo en Rhino
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