R := 1
S(θ, ϕ) := [R*cos(θ)*cos(ϕ); R*sin(θ)*cos(ϕ); R*sin(ϕ)]
max := 50
i := 0 .. max
j := 0 .. max
θ[i] := i/max*2*π
ϕ[j] := (j/max - 1/2)*π
x[i, j] := S(θ[i], ϕ[j])[0]
y[i, j] := S(θ[i], ϕ[j])[1]
z[i, j] := S(θ[i], ϕ[j])[2]
fil := rows(x) = 51
# Redondea a tres decimales:
B[j*fil + i, 0] := round(x[i, j], 3)
B[j*fil + i, 1] := round(y[i, j], 3)
B[j*fil + i, 2] := round(z[i, j], 3)
# [component: inputs B]
