# Title: Esfera
## SUPERFICE DE LA ESFERA
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X ≡ 0
Y ≡ 1
Z ≡ 2
# Supóngase una esfera de radio R
# centrada en el origen de coordenadas.
# Se desea encontrar n puntos distribuidos
# en su superficie.
# La forma paramétrica de la esfera
# El radio de la esfera:
R := 1
S(θ, ϕ) := [R*cos(θ)*cos(ϕ); R*sin(θ)*cos(ϕ); R*sin(ϕ)]
# Variables involucradas
# El tamaño del conjunto de puntos:
max := 5
j := 0 .. max
# Iterativas para cada variable de la función:
i := 0 .. max
θ[i] := i/max*2*π
ϕ[j] := (j/max - 1/2)*π
# Evaluando la ecuación de superficie para cada coordenada cartesiana:
x[i, j] := S(θ[i], ϕ[j])[X]
y[i, j] := S(θ[i], ϕ[j])[Y]
z[i, j] := S(θ[i], ϕ[j])[Z]
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# Finalmente se desea exporetar un archivo de texto con los valores X,Y,Z
# en las columnas 0,1 y 2:
fil := rows(x) = 6  # Número de filas a procesar
# Redondea a tres decimales con la función interconstruída round():
B[j*fil + i, X] := round(x[i, j], 3)
B[j*fil + i, Y] := round(y[i, j], 3)
B[j*fil + i, Z] := round(z[i, j], 3)
# [component: inputs B]
# Exportación de la matriz de paso a
# archivo de texto ESFERA.TXT
