# EL ESPIRÓGRAFO COMO JUGUETE INFANTIL
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# La belleza de las curvas del espirógrafo dependen de los parámetros de ciclo. Los diseñadores del juguete seleccionan cuidadosamente aquellos radios que con un par de trazos resultan agradables.
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# Básicamente son curvas de círculo con radios diferentes de giro y trazo, por lo que es sencillo utilizar cuvas paramétricas seno y coseno para cada eje. La variable paramétrica t está definida por el número de revoluciones para completar un ciclo de curva.
n := 3
r := 7
R := 15
N := 20
t := 0, 0.1 .. N*2*π
# 1) CURVAS HIPOCICLOIDE EN EL ESPIRÓGRAFO
Hx(t) := (R - r)*cos(t) + (r/n)*cos((R - r)/r*t)
Hy(t) := (R - r)*sin(t) - (r/n)*sin((R - r)/r*t)
# 2) CURVAS EPICICLOIDE EN EL ESPIRÓGRAFO
Ex(t) := (R + r)*cos(t) - (r/n)*cos((R + r)/r*t)
Ey(t) := (R + r)*sin(t) - (r/n)*sin((R + r)/r*t)
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# El archivo PDF está aqui
