## Número aúreo
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# El planteamiento de la proporción aúrea:
L == a + b solve, a → L - b
# (ec. 1)
a/b == b/L solve, a → b^2/L
# Suponga:
L := 1
r1 := sqrt(5)/2 - 1/2
b^2/L == L - b solve → [sqrt(5)/2 - 1/2; -sqrt(5)/2 - 1/2]
r2 := -sqrt(5)/2 - 1/2
# Las raíces de la ecuación son los valores de b. Solo es posible geométricamente el valor positivo:
b := sqrt(5)/2 - 1/2 = 0.618034
# (de ec. 1)
a := b^2 = 0.381966
# La proporción aúrea es:
b/a = 1.61803
# La relación con la serie de Fibonacci
# La serie de Fibonacci puede ser definida también como:
Fibonacci(n) := (((1 + sqrt(5))/2)^n - ((1 - sqrt(5))/2)^n)/sqrt(5)
# O sea:
Fibonacci(n) := |(r1^n - r2^n)/sqrt(5)|
# Ejemplo
# Considere la variable índice:
i := 0 .. 8
# La serie arroja:
Fibonacci(i) = [0; 1; 1; 2; 3; 5; 8; 13; 21]
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