## Imágenes en tonos de gris
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# El nombre "Lenna" es el que aparece en el artículo original de Playboy, al haber cambiado el nombre original de Lena Söderberg en la revista para que fuera pronunciado correctamente por los angloparlantes.
#
# La imagen es tan conocida que Lena Soderberg (de soltera Sjööblom), una sueca, fue la invitada de honor de la 50ª Conferencia Anual de la Society for Imaging Science in Technology, en 1997.
#
# La utilización de esta imagen ha pasado por diversas vicisitudes debido a la desnudez original de la imagen, y también debido al hecho de que Playboy intentó luchar contra el uso no autorizado de la imagen. Pero la revista abandonó pronto la vía legal y se mostró de acuerdo con el uso de "Lenna" por motivos publicitarios. Según la revista Wired, "a pesar de que Playboy es famoso por adoptar medidas contra el uso ilegal de sus imágenes, decidió pasar por alto el uso generalizado de este póster central en particular."
#
# David C. Munson, redactor-jefe durante las discusiones del IEEE acerca del tratamiento de imágenes en enero de 1996, cita dos razones que explican la popularidad de esta imagen en el terreno de la investigación: "en primer lugar, esta imagen contiene buenas mezclas de detalles, de zonas planas, y una textura que hace trabajar bien a los diferentes algoritmos de compresión de imagen. ¡Es una buena imagen de prueba! Además, "Lenna" es la imagen de una mujer atractiva. No resulta sorprendente que la comunidad que investiga sobre compresión de imagen (principalmente masculina) gravite alrededor de una imagen que les resulte atractiva." [Wikipedia]
# Las funciones en MathCAD para leer imágenes
Mgray := READ_IMAGE("Lenna.jpg")
# [component: inputs Mgray]
# Las propiedades de la matriz son:
FIL := rows(Mgray) - 1 = 405
COL := cols(Mgray) - 1 = 405
i := 0 .. FIL
j := 0 .. COL
# El promedio es:
ϕ := 1/(FIL*COL)*sum(sum(Mgray[i, j], j), i) = 81.8431
# El histograma puede ser calculado utilizando la función de MathCAD:
H := histogram(20, Mgray)
max(H[:, 1]) = 21177
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# Operaciones individuales
# Implican la generación de una nueva imagen modificando el valor de cada pixel basándose en una regla global aplicada.
# Operador inverso o negativo
A := 255 - Mgray
# [component: inputs Mgray]
# [component: inputs A]
# Operador umbral
δ := 80
A[i, j] := if(Mgray[i, j] > δ, 255, 0)
# [component: inputs Mgray]
# [component: inputs A]
# Operador umbral binario
δ1 := 70
δ2 := 120
A[i, j] := if(Mgray[i, j] < δ1, 0, if(Mgray[i, j] > δ2, 255, Mgray[i, j]))
# [component: inputs Mgray]
# [component: inputs A]
# Intesidad no lineal
f(I) := 255*(1 - e^(-5/255*I))
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A[i, j] := f(Mgray[i, j])
H := histogram(20, A)
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# [component: inputs Mgray]
# [component: inputs A]
# Operaciones de vecindad
μ := [1, 2, 1; 0, 0, 0; -1, -2, -1]
SubM(x, y) := [
    Mgray[x - 1, y - 1], Mgray[x - 1, y], Mgray[x - 1, y + 1];
    Mgray[x, y - 1], Mgray[x, y], Mgray[x, y + 1];
    Mgray[x + 1, y - 1], Mgray[x + 1, y], Mgray[x + 1, y + 1]
]
# La fila n de μ esta dada por la columna n de la traspuesta de μ. La operación de vecindad esta dada por:
OP(x, y) := transpose(μ)[:, 0]*SubM(x, y)[:, 0] + transpose(μ)[:, 1]*SubM(x, y)[:, 1] + transpose(μ)[:, 2]*SubM(x, y)[:, 2]
# Las operaciones de vecindad no pueden efectuarse en los límites de la imagen (los cuales no tienen pixeles vecinos, por lo que la matriz resultante tiene rangos de:
x := 1 .. FIL - 1
y := 1 .. COL - 1
A := Mgray
A[x, y] := OP(x, y)
# [component: inputs A]
