## Imágenes RGB
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# Las raíces de la ecuación son los valores de b. Solo es posible geométricamente el valor positivo:
# [component: inputs "colores.jpg"]
# Las funciones en MathCAD para leer imágenes
# Las componentes de color RGB pueden leerse por separado:
Mr := READ_RED("colores.jpg")
Mg := READ_GREEN("colores.jpg")
Mb := READ_BLUE("colores.jpg")
# O sea:
MT := [Mr; Mg; Mb]
# Y también leer la imagen como tonos de gris:
Mgray := READ_IMAGE("colores.jpg")
FIL := rows(Mgray) = 57
COL := cols(Mgray) = 418
i := 0 .. FIL - 1
j := 0 .. COL - 1
# [component: inputs Mr]
# [component: inputs Mg]
# [component: inputs Mb]
# [component: inputs [(Mr, Mg, Mb), □, □]]
Prom := (Mr + Mg + Mb)/3
# [component: inputs Mgray]
# [component: inputs Prom]
H := histogram(255, Prom)
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# [component: inputs MT]
image := augment(Mr, augment(Mg, Mb))
WRITERGB("mycolor.jpg") := image
Ar[i, j] := if(Mr[i, j] > 220, 255, 0)
# [component: inputs Ar]
