## RECTA 3D
## Interpolación lineal
# Considere los puntos P y Q en R3:
Q := [2; 8; 9]
P := [6; 3; 1]
# La ecuación del segmento de recta que los une es:
Recta(t) := P + t*(Q - P)
# y su gráfica en 3D:
s := CreateSpace(Recta, 0, 1)
# [component: inputs s]
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## Interpolación circular
# Se desea interpolar los puntos P y Q con un segmento de arco, cuyo radio sea igual a la distancia PQ. El segmento de arco se desea sobre el plano que forman los puntos P y Q con un punto S.
r := |Q - P| = 10.247
S := [17; 9; 0]
# El plano que forman los tres puntos está definido por los vectores V1 y V2
V1 := (P - Q)/|P - Q|
V2 := (S - P)/|S - P|
# y la normal al plano es
N := V1×V2/|V1×V2| = [0.417621; -0.661889; 0.622491]
# El punto pq situado a la mitad de la distancia entre P y Q es
pq := r/2*V1 + Q = [4; 5.5; 5]
# Y finalmente el cálculo del centro del arco O es de altura sqrt(3)/2 ya que es un triángulo equilátero (la distancia de OP y la OQ debe ser igual a PQ):
V3 := V1×N/|V1×N| = [-0.820495; -0.569041; -0.0545971]
O := sqrt(3)/2*r*V3 + pq = [-3.28117; 0.450266; 4.5155]
|O - P| = 10.247
|O - Q| = 10.247
Voq := (Q - O)/|Q - O|
Vop := (P - O)/|P - O|
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## Cambio de base
# La matriz de transformación de ejes para la interpolación es el sistema:
X ≡ 0
Y ≡ 1
Z ≡ 2
M[:, X] := Voq
M[:, Z] := N
M[:, Y] := M[:, X]×M[:, Z]
M = [0.515389, 0.748309, 0.417621; 0.736779, -0.138057, -0.661889; 0.437643, -0.648825, 0.622491]
# La ecuación paramétrica de un círculo con radio r y centro en el origen
ArcoParametrico(u) := [r*cos(u); r*sin(u); 0]
# y su transformación geométrica en el sistema de ejes M
Arco(u) := M*ArcoParametrico(u) + O
# Evaluada en el rango:
θ_min := 0
θ_max := acos(Voq*Vop/(|Voq|*|Vop|)) = 60 deg
Arco(θ_max) = [6; 3; 1]
P = [6; 3; 1]
Arco(θ_min) = [2; 8; 9]
Q = [2; 8; 9]
## Gráfica 3D
# La matriz de puntos es necesaria para graficar 3D en MathCAD tanto los puntos como la curva de la ecuación (1).
Pts := [P[X], P[Y], P[Z]; Q[X], Q[Y], Q[Z]; O[X], O[Y], O[Z]; pq[X], pq[Y], pq[Z]]
Gr := CreateSpace(Arco, θ_min, θ_max)
# [component: inputs Gr, (Pts[:, X], Pts[:, Y], Pts[:, Z])]
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