# Title: Line & Facet
## Intersecta una linea a un facet?
# Calcular la eq del plano (Ax+By+Cz+D) a partir de 3 puntos:
# [component: inputs "Linea & Facet.gif"]
X := 0
Y := 1
Z := 2
P0 := [2; 4; 1]
P1 := [5; 2; 3]
P2 := [1; 2; 4]
# Metodo de normales
V1 := P1 - P0
V2 := P2 - P0
N := V1×V2
N = [-2; -11; -8]
N := N/|N|
A := N[X]
B := N[Y]
C := N[Z]
D := -(N[X]*P0[X] + N[Y]*P0[Y] + N[Z]*P0[Z])
A = -0.145479
B = -0.800132
C = -0.581914
D = 4.0734
# La ecuación del plano es entonces:
Plano(p) := A*p[X] + B*p[Y] + C*p[Z] + D
# Evaluando en cualquier punto del facet debe resultar cero:
Plano(P0) = 0
Plano(P1) = -8.88178e-16
Plano(P2) = -8.88178e-16
# Se desea saber si la recta Q0-Q1 toca el facet. Tómese en consideración que los puntos pueden estar en cualquier posición y no necesariamente cruzando el facet como se muestra en la figura:
Q0 := [2; 4; 8]
Q1 := [3; 2; 0]
# El vector Vq une los puntos Q0 y Q1:
Vq := Q1 - Q0
Vq = [1; -2; -8]
# (usando Q1)
u := Plano(Q0)/(-N*Vq)
u = 0.666667  # Intersecta, pues 0<u<1
# El punto de interseccion R:
R := Q0 + u*Vq
# (usando Q1)
R = [2.66667; 2.66667; 2.66667]
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# Se deja como ejercicio comprobar que la ecuación es:
# (usando Q0)
u := (A*Q0[X] + B*Q0[Y] + C*Q0[Z] + D)/(A*(Q0[X] - Q1[X]) + B*(Q0[Y] - Q1[Y]) + C*(Q0[Z] - Q1[Z]))
u = 0.666667  # Intersecta, pues 0<u<1
# El punto de interseccion R:
R := Q0 + u*Vq  # (usando Q0)
R = [2.66667; 2.66667; 2.66667]
Plano(R) = 8.88178e-16  # se comprueba que R queda en el plano!
# La minima distancia de Q0 y Q1 al plano es:
Plano(Q0) = -4.0734
Plano(Q1) = 2.0367
# Comprobando los valores de P y Q en un programa de CAD, el punto de interseccion es t.
t := [8/3; 8/3; 8/3]
Plano(t) = 0  # se comprueba que queda en el plano!
|t - Q1| = 2.76887
|t - Q0| = 5.53775
# y las distancias tambien coinciden en el CAD!
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# El punto en el plano de la distancia Q1 al plano:
pto := Q1 + N*Plano(Q1)
pto = [2.7037; 0.37037; -1.18519]
|pto - Q1| = 2.0367  # obvio! distancia minima
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# Prof.Dr. E. López 2009
