# Title: Nube de puntos a partir de tonos de grises
# Description: CONVERTIR UNA FOTO EN TONOS DE GRISES A NUBE DE PUNTOS XYZ
# CONVERTIR UNA GRAFICA EN BLANCO/NEGRO A NUBE DE PUNTOS EN COORDENADAS ESFERICAS
# El primer paso es leer el archivo que contiene la gráfica a convertir, utilizando la función
# interconstruída de MathCAD READBMP. Esta función admite como argumento un string
# con el nombre del archivo en formato BMP. Como resultado, regresa una matriz 2D con
# filas y columnas por cada pixel de la foto. Los valores de esta matriz son el tono de gris
# de cada pixel en un rango 0-255, en donde 0 es negro y 255 blanco.
Foto := READBMP("PicMap.bmp")
# [component: inputs Foto]
# Los valores de filas y columnas puedenobtenerse con las funciones de MathCAD:
MAXFIL := rows(Foto)
MAXFIL = 374
MAXCOL := cols(Foto)
MAXCOL = 910
# y las variables índices para modificarcada valor de la matriz de pixeles:
i := 0 .. MAXFIL - 1
j := 0 .. MAXCOL - 1
# Para hacer la conversión a coordenadas esféricas es necesario convertir todos los pixeles (filas x columnas) en 3 vectores que representan los valores de X, Y, Z.
Foto[i, j] := if(Foto[i, j] > 200, 0, 1)
θ[i] := i/MAXFIL*1*π
φ[j] := j/MAXCOL*2*π
X[i, j] := Foto[i, j]*sin(θ[i])*cos(φ[j])
x[i, j] := sin(θ[i])*cos(φ[j])
Y[i, j] := Foto[i, j]*sin(θ[i])*sin(φ[j])
y[i, j] := sin(θ[i])*sin(φ[j])
Z[i, j] := Foto[i, j]*cos(θ[i])
z[i, j] := cos(θ[i])
# Para graficar 3D es necesario un vector (world) que contiene los valores de X, Y, Z en la columna cero. La columna uno es para establecer un fondo de colores que hagan un mejor constraste.
world := [X, x; Y, y; Z, z]
# [component: inputs world[:, 0], world[:, 1]]
# Es posible contruir la matriz B copiando en sus columnas los vectores xyz:
k := 0 .. MAXFIL*MAXCOL - 1
Px[k] := mod(k, MAXFIL)
Py[k] := mod(k, MAXCOL)
B[k, 0] := X[(Px[k], Py[k])]
B[k, 1] := Y[(Px[k], Py[k])]
B[k, 2] := Z[(Px[k], Py[k])]
# y guardar la matriz B en un archivo de texto, separado por comas:
# [component: inputs B]
# La importación de datos en un programa de CAD se muestra a continuación:
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# El archivo PDF está disponible en este link.
