# Title: RoKiSim - Quaternion 2 Euler
# Description: https://lopezgrr.github.io/www/
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# Copio el Quaternion:
# 0.34290,0.09578,0.81353,0.45979
q := [0.34290; 0.09578; 0.81353; 0.45979]
Euler_ϕ := 180 + 57.3*atan(2*(q[0]*q[1] + q[2]*q[3])/(1 - 2*(q[1]^2 + q[2]^2))) = 112.79  # sumo 180 para ver el lado +
Euler_θ := 57.3*asin(2*(q[0]*q[2] - q[3]*q[1])) = 28.0261
Euler_ψ := 180 + 57.3*atan(2*((q[0]*q[3] + q[1]*q[2])/(1 - 2*(q[2]^2 + q[3]^2)))) = 147.738  # sumo 180 para ver el lado +
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# Copio el Quaternion:
# 0.50007, -0.56168, -0.65777, 0.04232
q := [0.50007; -0.56168; -0.65777; 0.04232]
Euler_ϕ := -180 + 57.3*atan(2*(q[0]*q[1] + q[2]*q[3])/(1 - 2*(q[1]^2 + q[2]^2))) = -128.789  # resto 180 para ver el lado -
Euler_θ := 57.3*asin(2*(q[0]*q[2] - q[3]*q[1])) = -37.6155
Euler_ψ := 57.3*atan(2*((q[0]*q[3] + q[1]*q[2])/(1 - 2*(q[2]^2 + q[3]^2)))) = 80.4802
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# Copio el Quaternion:
# 0.55580, 0.34778, 0.50386, 0.56238
q := [0.55580; 0.34778; 0.50386; 0.56238]
Euler_ϕ := 57.3*atan(2*(q[0]*q[1] + q[2]*q[3])/(1 - 2*(q[1]^2 + q[2]^2))) = 75.2914
Euler_θ := 57.3*asin(2*(q[0]*q[2] - q[3]*q[1])) = 9.72585
Euler_ψ := 180 + 57.3*atan(2*((q[0]*q[3] + q[1]*q[2])/(1 - 2*(q[2]^2 + q[3]^2))))
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# Copio el Quaternion:
# 0.64507, -0.65441, -0.17692, -0.35261
q := [0.64507; -0.65441; -0.17692; -0.35261]
Euler_ϕ := 57.3*atan(2*(q[0]*q[1] + q[2]*q[3])/(1 - 2*(q[1]^2 + q[2]^2)))
Euler_θ := 57.3*asin(2*(q[0]*q[2] - q[3]*q[1])) = -43.6139
Euler_ψ := 57.3*atan(2*((q[0]*q[3] + q[1]*q[2])/(1 - 2*(q[2]^2 + q[3]^2))))
