# Title: RoKiSim - Quaternion 2 Euler
# Description: https://lopezgrr.github.io/www/
# Cálculo del cuaternion de la orientación del porta-herramienta en el programa de simulación RoKiSim
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# - Descargue el programa de simulación
# - Cargue el robot default (ABB_IRB120.xml)
# - Del menú FILE, remueva la herramienta
# - Presione INIT para resetear la posición del robot
# - Copie los valores angulares de esta hoja de MathCAD en cada articulación del robot
# - Una vez en posición, observe el cuaternión resultado de esta hoja de cálculo y compárelo con el de la simulación RoKiSim
# - Por razones de cálculo, es posible que en algunos casos los resultados sean los valores complementarios
# Referencia: https://www.youtube.com/watch?v=0FbDyWXemLw
# ECUACIONES DE CUATERNIONES
# Rotación | Complemento
q_x(α) := transpose([cos(α/2), sin(α/2), 0, 0])
q_y(ϕ) := transpose([cos(ϕ/2), 0, sin(ϕ/2), 0])
NegQuaternion(Q) := [Q[0]; -Q[1]; -Q[2]; -Q[3]]
q_z(θ) := transpose([cos(θ/2), 0, 0, sin(θ/2)])
MQ(q1, q2) := [
    q1[0]*q2[0], -q1[1]*q2[1], -q1[2]*q2[2], -q1[3]*q2[3];
    q1[1]*q2[0], q1[0]*q2[1], -q1[3]*q2[2], q1[2]*q2[3];
    q1[2]*q2[0], q1[3]*q2[1], q1[0]*q2[2], -q1[1]*q2[3];
    q1[3]*q2[0], -q1[2]*q2[1], q1[1]*q2[2], q1[0]*q2[3]
]*[1; 1; 1; 1]  # Multiplicación
# NOTA:
# Aunque MathCAD permite a través de las preferencias determinar el valor índice de inicio para el uso de los contadores de posición en vectores y matrices, es mucho más claro declarar una variable DUMMY (que no se utiliza, pero ocupa un lugar) para el elemento cero del vector de juntas del robot en MathcAD y de esta manera hacer compatible los índices con la simulación RoKiSim, en donde el contador de juntas inicia en UNO.
# POSICIÓN #1
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DUMMY ≡ 0
θ := [DUMMY; 0; 0; 0; 0; 0; 0]*deg
z1 := q_z(θ[1])
z2 := q_y(θ[2])
z3 := q_y(θ[3] + 90*deg)
z4 := q_z(θ[4])
z5 := q_y(θ[5])
z6 := q_z(θ[6])
Quaternions := MQ(MQ(MQ(MQ(MQ(q_z(θ[1]), q_y(θ[2])), q_y(θ[3] + 90*deg)), q_z(θ[4])), q_y(θ[5])), q_z(θ[6]))
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Quaternions = [0.707107; 0; 0.707107; 0]
# Los valores de RoKiSim son:
# (0.70711, 0.00000, 0.70711, 0.00000)
# POSICIÓN #2
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θ := [DUMMY; 10; 25; 45; 40; 75; 60]*deg
z1 := q_z(θ[1])
z2 := q_y(θ[2])
z3 := q_y(θ[3] + 90*deg)
z4 := q_z(θ[4])
z5 := q_y(θ[5])
z6 := q_z(θ[6])
Quaternions := MQ(MQ(MQ(MQ(MQ(q_z(θ[1]), q_y(θ[2])), q_y(θ[3] + 90*deg)), q_z(θ[4])), q_y(θ[5])), q_z(θ[6]))
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Quaternions = [-0.500067; 0.561676; 0.657771; -0.0423154]
# Los valores de RoKiSim son:
# (0.50007, -0.56168, -0.65777, 0.04232)
# POSICIÓN #2
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θ := [DUMMY; 70; -35; 0; -40; 70; 180]*deg
z1 := q_z(θ[1])
z2 := q_y(θ[2])
z3 := q_y(θ[3] + 90*deg)
z4 := q_z(θ[4])
z5 := q_y(θ[5])
z6 := q_z(θ[6])
Quaternions := MQ(MQ(MQ(MQ(MQ(q_z(θ[1]), q_y(θ[2])), q_y(θ[3] + 90*deg)), q_z(θ[4])), q_y(θ[5])), q_z(θ[6]))
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Quaternions = [0.0288938; 0.708384; 0.441517; 0.549928]
# Los valores de RoKiSim son:
# (0.02889, 0.70838, 0.44152, 0.54993)
# POSICIÓN #3
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θ := [DUMMY; 70; 40; 0; -55; 55; 150]*deg
z1 := q_z(θ[1])
z2 := q_y(θ[2])
z3 := q_y(θ[3] + 90*deg)
z4 := q_z(θ[4])
z5 := q_y(θ[5])
z6 := q_z(θ[6])
Quaternions := MQ(MQ(MQ(MQ(MQ(q_z(θ[1]), q_y(θ[2])), q_y(θ[3] + 90*deg)), q_z(θ[4])), q_y(θ[5])), q_z(θ[6]))
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Quaternions = [0.35747; 0.354286; 0.859527; 0.0889346]
# Los valores de RoKiSim son:
# (0.35747, 0.35429, 0.85953, 0.08893)
