# Title: RoKiSim - Quaternion 2 Euler
# Description: https://lopezgrr.github.io/www/
# Análisis de la cadena cinemática de un robot ABB IRB120
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# Considere la ecuaciones de las transformaciones geométricas:
# Traslación
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T(Δx, Δy, Δz) := [1, 0, 0, Δx; 0, 1, 0, Δy; 0, 0, 1, Δz; 0, 0, 0, 1]
# Rotación en el eje X
Rx(θ) := [1, 0, 0, 0; 0, cos(θ), -sin(θ), 0; 0, sin(θ), cos(θ), 0; 0, 0, 0, 1]
# Rotación en el eje Y
Ry(θ) := [cos(θ), 0, sin(θ), 0; 0, 1, 0, 0; -sin(θ), 0, cos(θ), 0; 0, 0, 0, 1]
# - Descargue el programa de simulación
# - Cargue el robot default (ABB_IRB120.xml)
# - Del menú FILE, remueva la herramienta
# - Presione INIT para resetear la posición del robot
# - Copie los valores angulares de esta hoja de MathCAD en cada articulación del robot
# - Una vez en posición, observe la posición resultado de esta hoja de cálculo y compárelo con el de la simulación RoKiSim
# - Por razones de cálculo, es posible que en algunos casos los resultados sean los valores complementarios
# Rotación en el eje Z
Rz(θ) := [cos(θ), -sin(θ), 0, 0; sin(θ), cos(θ), 0, 0; 0, 0, 1, 0; 0, 0, 0, 1]
# DEL MANUAL DEL ROBOT
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L := transpose([290, 270, 70, 134, (302 - 134), 72])
L = [290; 270; 70; 134; 168; 72]
Q(ϕ) := Rz(ϕ[1])*T(0, 0, L[0])*Ry(ϕ[2])*T(0, 0, L[1])*Ry(ϕ[3])*T(0, 0, L[2])*T(L[3], 0, 0)*Rx(ϕ[4])*T(L[4], 0, 0)*Ry(ϕ[5])*T(L[5], 0, 0)*Rx(ϕ[6])
# POSICIÓN #0
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DUMMY ≡ 0
θ := [DUMMY; 0; 0; 0; 0; 0; 0]*deg
TCP := Q(θ)[:, 3] = [374; 0; 630; 1]
# POSICIÓN #1
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θ := [DUMMY; 77; -40; 40; -60; 50; 81]*deg
TCP := Q(θ)[:, 3] = [85.8468; 159.505; 539.254; 1]
# POSICIÓN #2
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θ := [DUMMY; 10; 25; 45; 40; 75; 60]*deg
TCP := Q(θ)[:, 3] = [228.085; 85.6109; 239.125; 1]
# POSICIÓN #3
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θ := [DUMMY; 70; -35; 0; -40; 70; 180]*deg
TCP := Q(θ)[:, 3] = [75.8445; 81.2259; 713.401; 1]
# POSICIÓN #4
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θ := [DUMMY; 70; 40; 0; -55; 55; 150]*deg
TCP := Q(θ)[:, 3] = [202.655; 415.532; 303.873; 1]
