# SISTEMAS AFINES DE COORDENADAS CON CAMBIO DE BASE
## Ecuación de la rodonea
x(t) := a*cos(m*t)*cos(t)
y(t) := a*cos(m*t)*sin(t)
z(t) := 0
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a ≡ 3
m ≡ 5
F(t) := [x(t); y(t); z(t)]
X ≡ 0
Y ≡ 1
Z ≡ 2
# Suponga que se tienen los siguientes puntos A,B,C,O y se desea "colocar" una rodonea en los planos definidos por los triángulos formados por éstos.
A := [10; 3; 18]
B := [5; 10; 12]
C := [5; 2; 20]
O := [20; 21; 15]
# A continuación se determinarán las matrices de cambio de base para los planos deseados.
# SISTEMA DE EJES DEL TRIANGULO A-B-C
# El centro del triángulo A-B-C está definido por:
c := (A + B + C)/3 = [6.66667; 5; 16.6667]
# Suponga que el eje X estará definido por el segmento de recta entre los puntos A y el centro del triángulo.
EjeX := (A - c)/|A - c| = [0.811107; -0.486664; 0.324443]  # Eje #0 del sistema ABC
# El eje Z estará en la normal al plano del triángulo formado por los vectores V1 y V2. Estos vectores son definidos por los segmentos de recta entre los puntos A-B y A-C.
V1 := (A - B)/|A - B|
V2 := (A - C)/|A - C|
N := V1×V2
EjeZ := N/|N| = [0.140028; 0.70014; 0.70014]  # Eje #1 del sistema ABC
# Como consecuencia de la determinación de los ejes X y Z, el eje Y se calcula ortogonal a ellos.
EjeY := EjeZ×EjeX = [0.567889; 0.522457; -0.636035]  # Eje #2 del sistema ABC
## Cambio de base
# La matriz de cambio de base es por lo tanto:
M_abc[:, X] := EjeX
M_abc[:, Y] := EjeY
M_abc[:, Z] := EjeZ
M_abc = [0.811107, 0.567889, 0.140028; -0.486664, 0.522457, 0.70014; 0.324443, -0.636035, 0.70014]
CurvaABC(t) := M_abc*F(t) + c
S_abc := CreateSpace(CurvaABC, t0, t1, res)
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# SISTEMA DE EJES DEL TRIANGULO A-B-O
# El centro del triángulo A-B-O está definido por:
c := (A + B + O)/3 = [11.6667; 11.3333; 15]
# Suponga que el eje X estará definido por el segmento de recta entre los puntos A y el centro del triángulo.
EjeX := (A - c)/|A - c| = [-0.184932; -0.924658; 0.332877]  # Eje #0 del sistema ABO
# El eje Z estará en la normal al plano del triángulo formado por los vectores V1 y V2. Estos vectores son definidos por los segmentos de recta entre los puntos A-B y A-O.
V1 := (A - B)/|A - B|
V2 := (A - O)/|A - O|
N := V1×V2
EjeZ := N/|N| = [0.44171; -0.380784; -0.81234]  # Eje #1 del sistema ABO
# Como consecuencia de la determinación de los ejes X y Z, el eje Y se calcula ortogonal a ellos.
EjeY := EjeZ×EjeX = [-0.877891; 0.00319233; -0.47885]  # Eje #2 del sistema ABO
## Cambio de base
# La matriz de cambio de base es por lo tanto:
M_abo[:, X] := EjeX
M_abo[:, Y] := EjeY
M_abo[:, Z] := EjeZ
M_abo = [-0.184932, -0.877891, 0.44171; -0.924658, 0.00319233, -0.380784; 0.332877, -0.47885, -0.81234]
CurvaABO(t) := M_abo*F(t) + c
S_abo := CreateSpace(CurvaABO, t0, t1, res)
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# SISTEMA DE EJES DEL TRIANGULO A-C-O
# El centro del triángulo A-C-O está definido por:
c := (A + C + O)/3 = [11.6667; 8.66667; 17.6667]
# Suponga que el eje X estará definido por el segmento de recta entre los puntos A y el centro del triángulo.
EjeX := (A - c)/|A - c| = [-0.281718; -0.957841; 0.0563436]  # Eje #0 del sistema ACO
# El eje Z estará en la normal al plano del triángulo formado por los vectores V1 y V2. Estos vectores son definidos por los segmentos de recta entre los puntos A-C y A-O.
V1 := (A - C)/|A - C|
V2 := (A - O)/|A - O|
N := V1×V2
EjeZ := N/|N| = [-0.380696; 0.0576812; -0.922899]  # Eje #1 del sistema ACO
# Como consecuencia de la determinación de los ejes X y Z, el eje Y se calcula ortogonal a ellos.
EjeY := EjeZ×EjeX = [-0.880741; 0.281447; 0.380896]  # Eje #2 del sistema ACO
## Cambio de base
# La matriz de cambio de base es por lo tanto:
M_aco[:, 0] := EjeX
M_aco[:, 1] := EjeY
M_aco[:, 2] := EjeZ
M_aco = [-0.281718, -0.880741, -0.380696; -0.957841, 0.281447, 0.0576812; 0.0563436, 0.380896, -0.922899]
CurvaACO(t) := M_aco*F(t) + c
S_aco := CreateSpace(CurvaACO, t0, t1, res)
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## Gráfica 3D
# Los valores de la gráfica son:
# lower limit: | upper limit: | resolución:
res ≡ 500
t0 ≡ 0
t1 ≡ 10*π
# [component: inputs S_abc, S_abo, S_aco]
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