## ROTACIONES 3D
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# [component: inputs "Rotaciones3Da.jpg"]
X := 0
Y := 1
Z := 2
# La forma convencional 2D
# La matriz de rotación 2D en el eje Z:
Rz(ϕ) := [cos(ϕ), -sin(ϕ); sin(ϕ), cos(ϕ)]
# En la figura, suponga una posición de P:
P := [4; 3]
# Por lo que
α := atan(P[Y]/P[X])
α = 36.8699 deg
# Se desea rotar P al siguiente valor de θ:
θ := 45*deg
# Simplemente Q es la transformación de P:
Q := Rz(θ)*P
Q = [0.707107; 4.94975]
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# Usando matrices homogéneas en 2D
# Redefiniendo la ecuación de rotación:
Rz(ϕ) := [cos(ϕ), -sin(ϕ), 0; sin(ϕ), cos(ϕ), 0; 0, 0, 1]
# P entonces tiene:
P := [4; 3; 1]
# Simplemente Q es la transformación de P:
Q := Rz(θ)*P
Q = [0.707107; 4.94975; 1]
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# La forma convencional 3D
# Redefiniendo la matriz de rotación 3D en el eje Z:
Rz(ϕ) := [cos(ϕ), -sin(ϕ), 0; sin(ϕ), cos(ϕ), 0; 0, 0, 1]
# P entonces tiene componente en Z:
P := [4; 3; 0]
# Simplemente Q es la transformación de P:
Q := Rz(θ)*P
Q = [0.707107; 4.94975; 0]
# Usando matrices homogéneas en 3D
# Redefiniendo la ecuación de rotación:
Rz(ϕ) := [cos(ϕ), -sin(ϕ), 0, 0; sin(ϕ), cos(ϕ), 0, 0; 0, 0, 1, 0; 0, 0, 0, 1]
# P entonces tiene:
P := [4; 3; 0; 1]
# Simplemente Q es la transformación de P:
Q := Rz(θ)*P
Q = [0.707107; 4.94975; 0; 1]
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# Finalmente, ejemplo de cinemática directa de un robot 2D
# Resolver el robot 2D de la figura.
# La matriz de traslación en XYZ es:
# [component: inputs "Rotaciones3Db.jpg"]
T(Δx, Δy, Δz) := [1, 0, 0, Δx; 0, 1, 0, Δy; 0, 0, 1, Δz; 0, 0, 0, 1]
# Los valores de las longitudes pueden expresarse en un arreglo de constantes L. Las variables de entrada son los valores angulares del arreglo θ:
L := [5.83; 4.24]
θ := [59.04; -180 + 75.96]*deg
# El punto intermedio P es la rotación+traslación #0.
P := Rz(θ[0])*T(L[0], 0, 0)
P[:, 3] = [2.99918; 4.99938; 0; 1]
# El cálculo de TCP simplemente involucra rotación+traslación #0 y #1.
# El TCP es la última columna de la matriz resultado.
Q := Rz(θ[0])*T(L[0], 0, 0)*Rz(θ[1])*T(L[1], 0, 0)  # <<<  (ec. del robot)
TCP := Q[:, 3]
TCP = [5.99732; 2.00125; 0; 1]
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