# ANÁLISIS DE LA CADENA CINEMÁTICA DE UN ROBOT SCARA RS40
# [component: inputs "SCARA.gif"]
# El archivo de ensamble "SCARA.SLDASM" de SolidWorks v2007 contiene la cadena cinemática de un robot tipo SCARA RS40, preparado para que usted pueda fácilmente editar la posición, calcular los valores de rotación y traslación, observar el TCP, etc. El robot tiene un enlace interno a una tabla de diseño de EXCELL (RS40.xls), en donde cada vez que el archivo se graba, la tabla de diseño se actualiza con las nuevas posiciones. Esta tabla de diseño se utilizará aquí para probar las ecuaciones y los cálculos de la cadena cinemática.
# Considere la ecuaciones de las transformaciones geométricas:
X := 0
Y := 1
Z := 2
# Traslación
T(Δx, Δy, Δz) := [1, 0, 0, Δx; 0, 1, 0, Δy; 0, 0, 1, Δz; 0, 0, 0, 1]
# Rotación en
# el eje X
Rx(θ) := [1, 0, 0, 0; 0, cos(θ), -sin(θ), 0; 0, sin(θ), cos(θ), 0; 0, 0, 0, 1]
# Rotación en
# el eje Y
Ry(θ) := [cos(θ), 0, -sin(θ), 0; 0, 1, 0, 0; sin(θ), 0, cos(θ), 0; 0, 0, 0, 1]
# Rotación en
# el eje Z
Rz(θ) := [cos(θ), -sin(θ), 0, 0; sin(θ), cos(θ), 0, 0; 0, 0, 1, 0; 0, 0, 0, 1]
# La tabla RyT, muestra las rotaciones y traslaciones del robot (RS40) importadas desde el software SolidWorks v2007, a través del software Exell v2007.
# [component: outputs RyT]
# Los valores de las traslaciones son las celdas 0 a la 4. La 5 y 6 representan los valores angulares de las articulaciones en el robot. El signo del valor del ángulo representa el sentido de la rotación.
i := 0 .. 4
Δ[i] := RyT[0, i]
θ := [RyT[0, 6]; (-RyT)[0, 5]]*deg
Δ = [102.449; 170; 230; 108.645; 584]
θ = [0.932529; -0.0277507]
# A continuación se muestra el análisis de cada elemento del robot.
# ELEMENTO 1
# El elemento 1 viene dado por las matrices de traslación y rotación T0 y R0, respectivamente.
T(0, Δ[4], 0) = [1, 0, 0, 0; 0, 1, 0, 584; 0, 0, 1, 0; 0, 0, 0, 1]
Ry(θ[0]) = [0.595804, 0, -0.80313, 0; 0, 1, 0, 0; 0.80313, 0, 0.595804, 0; 0, 0, 0, 1]
# ELEMENTO 2
# El elemento 2 viene dado por las matrices traslación T1, T2 y rotación: R1
T(0, Δ[3], 0) = [1, 0, 0, 0; 0, 1, 0, 108.645; 0, 0, 1, 0; 0, 0, 0, 1]
T(0, 0, -Δ[2]) = [1, 0, 0, 0; 0, 1, 0, 0; 0, 0, 1, -230; 0, 0, 0, 1]
Ry(θ[1]) = [0.999615, 0, 0.0277472, 0; 0, 1, 0, 0; -0.0277472, 0, 0.999615, 0; 0, 0, 0, 1]
# ELEMENTO 3
# El elemento 3 viene dado por las matrices traslación T3 y T4.
T(Δ[1], 0, 0) = [1, 0, 0, 170; 0, 1, 0, 0; 0, 0, 1, 0; 0, 0, 0, 1]
T(0, -Δ[0], 0) = [1, 0, 0, 0; 0, 1, 0, -102.449; 0, 0, 1, 0; 0, 0, 0, 1]
# El cálculo del TCP, viene dado por la siguiente expresión:
P := T(0, RyT[0, 4], 0)*Ry(θ[0])*T(0, RyT[0, 3], -RyT[0, 2])*Ry(θ[1])*T(RyT[0, 1], 0, 0)*T(0, -RyT[0, 0], 0)
TCP := P[:, 3]
TCP = [289.756; 590.196; -3.36599; 1]
# CINEMÁTICA INVERSA
# Dado el punto TCP, encontrar los valores angulares que las articulaciones deben alcanzar.
# [component: inputs "Angulos scara1.gif"]
# [component: inputs "SCARA triangulo.gif"]
# Fig. 1.- SCARA RS40. (a) Dimensiones y valores del TCP, (b) Ángulos de la posición desconocidos.
# Relaciones trigonométricas para triángulos (oblicuángulo)
# Teorema de los senos:
a/sin(α) == b/sin(β) == c/sin(γ)
# Teorema de los cosenos:
a^2 == b^2 + c^2 - 2*b*c*cos(α)
b^2 == c^2 + a^2 - 2*c*a*cos(β)
c^2 == a^2 + b^2 - 2*b*c*cos(γ)
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# Sustituyendo para el robot, a y b son las longitudes de los miembros y c coincide con el TCPx
a := Δ[2] = 230
b := Δ[1] = 170
c := sqrt(TCP[X]^2 + TCP[Z]^2) = 289.775
# Los ángulos buscados son:
α := acos((a^2 - b^2 - c^2)/(-2*b*c))
α = 52.5056 deg
# Los ángulos provenientes
# de la tabla de diseño de
# SolidWorks son (véase
# el inicio de esta hoja):
β := acos((b^2 - a^2 - c^2)/(-2*a*c))
β = 35.9044 deg
θ = [53.43; -1.59] deg
γ := acos((c^2 - a^2 - b^2)/(-2*a*b))
γ = 91.59 deg
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