# SERIES
# Considere la serie de Taylor de 7 términos para la función e:
e(x) := x^0/0! + x^1/1! + x^2/2! + x^3/3! + x^4/4! + x^5/5! + x^6/6! + x^7/7!
# y puede escribirse de la forma:
E(x) := sum(x^i/i!, i = 0 .. 7)
# la evaluación de la función para
x := 0.5
e(x) explicit, x → e(0.5) = 1.64872
E(x) explicit, x → E(0.5) = 1.64872
# que puede compararse con la función interconstruida:
exp(x) = 1.64872
# Obsérvese que la exactitud del resultado depende del número de
# términos y el argumento x. El valor de x aumenta, debe aumentar
# el número de términos.
x := 4.8
e(x) explicit, x → e(4.8) = 107.739
E(x) explicit, x → E(4.8) = 107.739
exp(x) = 121.51
# La forma abreviada se presta mejor para ello. Con n=20:
E(x) := sum(x^i/i!, i = 0 .. 20)
E(x) = 121.51
# La serie del seno es
s(x) := x^1/1! - x^3/3! + x^5/5! - x^7/7!
# y puede escribirse de la forma:
S(x) := -sum((-1)^i*x^(2*i - 1)/(2*i - 1)!, i = 1 .. 10)
# La función S puede ser desglosada:
S(χ) series, χ, 7 → χ - χ^3/6 + χ^5/120 - χ^7/5040
# la evaluación de la función para
θ := π/8
S(θ) = 0.382683
sin(θ) = 0.382683
# que puede compararse con la función interconstruida:
sin(θ) = 0.382683
sin(χ) series, χ, 7 → χ - χ^3/6 + χ^5/120 - χ^7/5040
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