# SUPERFICIES TENSOR DE BEZIER
# Una superficie de tensor basado en curvas de Bezier está definida por los valores de las variables paramétricas
u := 0, 0.01 .. 1
v := u
# En donde el orden de las curvas n y m será:
n := 3
m := n
# por lo que las variables índice se pueden definir como
i := 0 .. n
j := i
# Las curvas de Bezier se basan en el polinomio de Bernstein, que está definido como:
B(i, u) := n!/(i!*(n - i)!)*u^i*(1 - u)^(n - i)
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# Suponga los siguientes puntos en R3:
Px[i] := 1, 2, 10, 7
Py[i] := 3.5, 9, 10, 3
# que serán los puntos de control. Entonces las curvas de Bezier son:
Cx(u) := sum(Px[i]*B(i, u), i = 0 .. n)
Cy(v) := sum(Py[j]*B(j, v), j = 0 .. m)
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# Y la superficie
.
S_Bezier(u, v) := sum(sum(Px[i]*B(i, u)*Py[j]*B(j, v), j = 0 .. m), i = 0 .. n)
# [component: inputs CreateMesh(S_Bezier, 0, 1, 0, 1)]
# . | .
.
