# TANGENTE DE UNA CURVA
# Considere la ecuación:
f(x) := -x^2 + 5*x + 8
# se desea encontrar un punto P para
x1 := 2
# por lo que la componente Py se obtiene evaluando la función.
P := [x1; f(x1)]
P = [2; 14]
# Las constantes de los ejes son:
X := 0
Y := 1
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# El intervalo de la tangente se calculará considerando un offset Δx atrás y adelante del punto P.
Δx := 1
# Para trazar la pendiente en la curva que pasa por el punto P se consideran los puntos inicio (Q) y fin (R) de la recta:
Q := [x1 - Δx; f(x1 - Δx)]
R := [x1 + Δx; f(x1 + Δx)]
Q = [1; 12]
R = [3; 14]
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# La pendiente de la recta tangente es la evaluación de la primer derivada de la curva...
m(x) := d/dx(f(x))
# ...evaluada en el punto P
m(P[X]) = 1
# por lo que:
R1[Y] := m(x1)*Δx + P[Y]
Q1[Y] := P[Y] - (m(x1)*Δx)
R1[Y] = 15
Q1[Y] = 13
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# Para graficar la pendiente simplemente se arreglan los puntos inicial y final de la recta en vectores para cada coordenada.
Xv := [R[X]; Q[X]]
Yv := [R1[Y]; Q1[Y]]
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# Como ejercicio se recomienda probar para otros valores de P. Se deja pendiente el cálculo de la normal de la pendiente. El PDF está aqui.
