# TREBOL CON CURVAS DE BEZIER RACIONALIZADAS
# Considere el polinomio de Bernstein bajo las siguientes condiciones:
n := 7
u := 0, 0.01 .. 1
i := 0 .. n
Bernstein(i, u) := n!/(i!*(n - i)!)*u^i*(1 - u)^(n - i)
# La curva de Bezier es:
C(Φ, u) := sum(Φ[i]*Bernstein(i, u), i = 0 .. n)  # (Ec. 1)
# El vector de pesos modifica la curva. Los elementos primero y último son un factor de uno.
ω_p[i] := rnd(8) + 1
ω_p[0] := 1
ω_p[n] := 1
# La curva de pesos es:
Wp(u) := sum(ω_p[i]*Bernstein(i, u), i = 0 .. n)  # (Ec. 2)
# Por lo que la curva racional de Bezier es:
Bezier(Φ, u) := sum(Φ[i]*ω_p[i]*Bernstein(i, u), i = 0 .. n)/sum(ω_p[i]*Bernstein(i, u), i = 0 .. n)  # (Ec. 3)
# Reescribiendo la ecuación 3 para cada eje coordenado:
X(Φ, u) := sum(Φ[i]*ω_p[i]*Bernstein(i, u), i = 0 .. n)
x(Φ, u) := X(Φ, u)/Wp(u)  # (Ec. 4)
Y(Φ, u) := sum(Φ[i]*ω_p[i]*Bernstein(i, u), i = 0 .. n)
y(Φ, u) := Y(Φ, u)/Wp(u)
# EJEMPLO #1
# Considere los puntos de control con valores aleatorios:
maxRnd := 50
Px[i] := i*rnd(maxRnd)
Py[i] := i*rnd(maxRnd)
# En donde el primer y último elemento son iguales y están en el origen.
Px[n] := Px[0]
Py[n] := Py[0]
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# Nótese la modificación (curva oscura) que sufrió la curva original (curva clara).
# Para graficar en simetría especular simplemente los valores del polígono de control se colocan en cada cuadrante.
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# EJEMPLO #2
# Para un arreglo polar, es necesario hacer un polígono de control para cada rotación. Considere el caso para:
Lados := 7
# Por lo que
L := 0 .. Lados - 1
θ[L] := 2*π/Lados*L
# Considere los puntos de control del primer pétalo con valores aleatorios:
M[i, L] := rnd(5)
N[i, L] := rnd(5)
# En donde el primer y último elemento (para formar el pétalo) son iguales y están en el origen.
M[n, L] := 0
N[n, L] := 0
# Ahora el arreglo polar para el resto de los pétalos será:
r[i] := sqrt(M[i, 0]^2 + N[i, 0]^2)
ϕ[i] := acos(M[i, 0]/r[i])
M[i, L] := r[i]*sin(ϕ[i] + θ[L])
N[i, L] := r[i]*cos(ϕ[i] + θ[L])
# En donde el primer y último elemento (para formar el pétalo) son iguales y están en el origen.
M[0, L] := 0
N[0, L] := 0
M[n, L] := M[0, L]
N[n, L] := N[0, L]
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# La siguiente gráfica muestra el arreglo de pétalos usando la rotación polar de los puntos de control.
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# El archivo PDF está aquí
